# Udenfor temperature: outside := 12
# Indenfor temperature: inside := 16
# Ønsket temperature: ref := 18
# Kontrol metode:
ΔT := outside - inside = -4
error := (ref - inside) = 2
dir := (ΔT ≥ 0) - (ΔT ≤ 0) = -1
# Positive åbner vinduer | Negative lukker vinduer
opening := error*dir = -2
opening := error = 2
# Reference og indenfor er vigtigst, f.eks. hvis temperaturen udenfor er lavere end indenfor, og referencen er høj, skal vinduerne ikke åbnes.
